<?xml version="1.0"?>
<!--


  ****************** IMPORTANT NOTICES **********************

   This file was generated by Datcom+ Pro, a superset of
   the USAF Digital DATCOM program.
   This file is considered an intermediary file in the
   DATCOM/JSBSim process. This file may be overwritten without
   warning, so any changes that you make in here may be lost.

   If you intend to use this file as it is and modify it, make
   sure that you take the necessary precautions to prevent it
   from being overwritten, like renaming it.


   ***********************************************************

   DISCLAIMER REQUIRED BY HQ USAF FOR PUBLIC RELEASE APPROVAL

   THIS SOFTWARE AND ANY ACCOMPANYING DOCUMENTATION
   IS RELEASED "AS IS".  THE U.S. GOVERNMENT MAKES NO
   WARRANTY OF ANY KIND, EXPRESS OR IMPLIED, CONCERNING
   THIS SOFTWARE AND ANY ACCOMPANYING DOCUMENTATION,
   INCLUDING, WITHOUT LIMITATION, ANY WARRANTIES OF
   MERCHANTABILITY OR FITNESS FOR A PARTICULAR PURPOSE.
   IN NO EVENT WILL THE U.S. GOVERNMENT BE LIABLE FOR ANY
   DAMAGES, INCLUDING LOST PROFITS, LOST SAVINGS OR OTHER
   INCIDENTAL OR CONSEQUENTIAL DAMAGES ARISING OUT OF THE
   USE, OR INABILITY TO USE, THIS SOFTWARE OR ANY
   ACCOMPANYING DOCUMENTATION, EVEN IF INFORMED IN ADVANCE
   OF THE POSSIBILITY OF SUCH DAMAGES.

   ***********************************************************
-->


<!-- **********************************************************************
        AERODYNAMICS
     *******************************************************************-->
<aerodynamics>

   <!-- *************************
             Sign Conventions
        *************************

        Control displacements
             Stick    FWD  + / Aft -
             Stick    Left + / Right -
             Wheel    CCW  + / CW -
             Pedal    Left + / Right -
             Elevator trim Nose Up + / Nose down -

        Surfaces
             Elevator  TED + / TEU -
             R Ail     TED + / TEU -
             L Ail     TED + / TEU -
             Rudder    TEL + / TER -

        F&M, Accel, Rates, Displacements
             Pitch     Up  + / Down -
             Roll      Rgt + / Left -
             Yaw       Rgt + / Left -

        Other
             Alpha     Up  + / Down -
             Beta Wind in right ear + / Wind in left ear -
             Slip Ball right of center + / left of center -
   -->


   <!-- **************************************
             ASSUMPTIONS AND LIMITATIONS

        There is no interaction between deflected surfaces modeled
        so there is no change in elevator effects with the flaps
        deflected, for example.

        Terms known to be missing from DATCOM:
           Ground effects
           Cyr, dCY_Rud, dCY_Ail, dCl_Rud, dCN_Rud

        **************************************
   -->

   <!-- The following functions provide properties in different units than are native to JSBSim -->

   <function name="attitude/pitch-deg">
      <description>Pitch angle in degrees</description>
      <product>
         <property>attitude/pitch-rad</property>
         <value>57.29577951</value>
      </product>
   </function>

   <function name="attitude/roll-deg">
      <description>Roll angle in degrees</description>
         <product>
         <property>attitude/roll-rad</property>
         <value>57.29577951</value>
      </product>
   </function>

   <function name="attitude/heading-true-deg">
      <description>Roll angle in degrees</description>
      <product>
         <property>attitude/heading-true-rad</property>
         <value>57.29577951</value>
      </product>
   </function>

   <function name="velocities/q-deg_sec">
      <description>Pitch rate in degrees per sec</description>
      <product>
         <property>velocities/q-aero-rad_sec</property>
         <value>57.29577951</value>
      </product>
   </function>

   <function name="velocities/p-deg_sec">
      <description>Pitch rate in degrees per sec</description>
      <product>
         <property>velocities/p-aero-rad_sec</property>
         <value>57.29577951</value>
      </product>
   </function>

   <function name="velocities/r-deg_sec">
      <description>Pitch rate in degrees per sec</description>
      <product>
         <property>velocities/r-aero-rad_sec</property>
         <value>57.29577951</value>
      </product>
   </function>


<!-- **********************************************************************
                LIFT FORCE
     ********************************************************************** -->

   <function name="aero/coefficient/CL_wbh">
      <description>
         Lift coefficient due to wing, body, and horizontal tail
      </description>
      <table>
         <independentVar lookup="row"> aero/alpha-deg </independentVar>
         <tableData>
                 -2.0000         .0981
                   .0000         .2992
                  2.0000         .5030
                  4.0000         .7100
                  8.0000        1.1366
                  9.0000        1.2288
                 10.0000        1.3115
                 11.0000        1.3869
                 12.0000        1.4542
                 13.0000        1.5127
                 14.0000        1.5608
                 15.0000        1.5961
                 16.0000        1.6419
         </tableData>
      </table>
   </function>

   <function name="aero/derivative/CLq-per_rad">
      <description>
         Lift coefficient derivative due to pitch rate, per rad
      </description>
      <table>
         <independentVar lookup="row"> aero/alpha-deg </independentVar>
         <tableData>
             -2.0000    7.6653
             16.0000    7.6653
         </tableData>
      </table>
   </function>

   <function name="aero/derivative/CLadot-per_rad">
      <description>
         Lift coefficient derivative due to AOA rate, per rad
         Important contributor to short period damping
      </description>
      <table>
         <independentVar lookup="row"> aero/alpha-deg </independentVar>
         <tableData>
                 -2.0000        1.5303
                   .0000        1.5684
                  2.0000        1.6427
                  4.0000        1.6966
                  8.0000        1.7708
                  9.0000        1.5957
                 10.0000        1.3688
                 11.0000        1.2683
                 12.0000        1.1384
                 13.0000         .9956
                 14.0000         .9167
                 15.0000         .8505
                 16.0000         .7918
         </tableData>
      </table>
   </function>

   <function name="aero/coefficient/dCL_Flap">
      <description>
         Lift coefficient increment due to flap deflection
         Positive surface deflection is trailing edge down.
      </description>
      <table>
         <independentVar lookup="row"> fcs/flap-pos-deg </independentVar>
         <tableData>
               .0000     .0000
             15.0000     .3641
             30.0000     .6513
             40.0000     .7359
         </tableData>
      </table>
   </function>

   <function name="aero/coefficient/dCL_Elev">
      <description>
         Lift coefficient increment due to elevator deflection.
         Positive surface deflection is trailing edge down.
      </description>
      <table>
         <independentVar lookup="row"> fcs/elevator-pos-deg </independentVar>
         <tableData>
            -20.0000    -.1032
            -15.0000    -.0963
            -10.0000    -.0670
             -5.0000    -.0335
               .0000     .0001
              5.0000     .0335
             10.0000     .0670
             13.0000     .0858
             16.0000     .1007
         </tableData>
      </table>
   </function>

   <function name="aero/coefficient/dCL_Power">
      <description>
         Lift coefficient increment due to thrust effects
      </description>
      <table>
         <independentVar lookup="row"> aero/alpha-deg </independentVar>
         <independentVar lookup="column"> propulsion/total-thrust-coefficient </independentVar>
         <tableData>
                            .0000     .1000     .2000     .3000
                -2.0000     .0000     .0005     .0009     .0014
                  .0000     .0000     .0005     .0009     .0014
                 2.0000     .0000     .0005     .0009     .0014
                 4.0000     .0000     .0005     .0009     .0014
                 8.0000     .0000     .0005     .0009     .0014
                 9.0000     .0000     .0005     .0009     .0014
                10.0000     .0000     .0005     .0009     .0014
                11.0000     .0000     .0005     .0009     .0014
                12.0000     .0000     .0005     .0009     .0014
                13.0000     .0000     .0005     .0009     .0014
                14.0000     .0000     .0005     .0009     .0014
                15.0000     .0000     .0005     .0009     .0014
                16.0000     .0000     .0005     .0009     .0014
         </tableData>
      </table>
   </function>

   <axis name="LIFT">

      <function name="aero/force/lift-lbs">
         <description>
            Lift force = ( CL_wbh + CLq*q*cbar/(2*V) + CLadot*adot*cbar/(2*V) + dCL_Flap + dCL_Elev + dCL_Power )
                         * q_bar * wing area
         </description>
         <product>
            <sum>
               <property> aero/coefficient/CL_wbh </property>
               <product>
                  <property> aero/derivative/CLq-per_rad </property>
                  <property> velocities/q-rad_sec </property>
                  <property> aero/ci2vel </property>
               </product>
               <product>
                  <property> aero/derivative/CLadot-per_rad </property>
                  <property> aero/alphadot-rad_sec </property>
                  <property> aero/ci2vel </property>
               </product>
               <property> aero/coefficient/dCL_Flap </property>
               <property> aero/coefficient/dCL_Elev </property>
               <property> aero/coefficient/dCL_Power </property>
            </sum>
            <property> aero/qbar-psf </property>
            <property> metrics/Sw-sqft </property>
         </product>
      </function>

   </axis>

<!-- **********************************************************************
                DRAG FORCE
     ********************************************************************** -->

   <function name="aero/coefficient/CD_wbh">
      <description>
         Drag coefficient due to wing, body, and horizontal tail
         Main contributor to Phugoid damping: greater Cd, better damping
      </description>
      <table>
         <independentVar lookup="row"> aero/alpha-deg </independentVar>
         <tableData>
                 -2.0000         .0133
                   .0000         .0163
                  2.0000         .0224
                  4.0000         .0320
                  8.0000         .0637
                  9.0000         .0728
                 10.0000         .0822
                 11.0000         .0918
                 12.0000         .1015
                 13.0000         .1111
                 14.0000         .1208
                 15.0000         .1301
                 16.0000         .1421
         </tableData>
      </table>
   </function>

   <function name="aero/coefficient/dCd_Power">
      <description>
         Drag coefficient increment due to thrust effects
      </description>
      <table>
         <independentVar lookup="row"> aero/alpha-deg </independentVar>
         <independentVar lookup="column"> propulsion/total-thrust-coefficient </independentVar>
         <tableData>
                            .0000     .1000     .2000     .3000
                -2.0000     .0000     .0000     .0000     .0000
                  .0000     .0000     .0000     .0000     .0000
                 2.0000     .0000     .0000     .0000     .0000
                 4.0000     .0000     .0000     .0000     .0000
                 8.0000     .0000     .0000     .0000     .0000
                 9.0000     .0000     .0000     .0000     .0000
                10.0000     .0000     .0000     .0000     .0000
                11.0000     .0000     .0000     .0000     .0000
                12.0000     .0000     .0000     .0000     .0000
                13.0000     .0000     .0000     .0000     .0000
                14.0000     .0000     .0000     .0000     .0000
                15.0000     .0000     .0000     .0000     .0000
                16.0000     .0000     .0000     .0000     .0000
         </tableData>
      </table>
   </function>

   <function name="aero/coefficient/dCD_Flap">
      <description>
         Drag coefficient increment due to flap deflection
         Positive surface deflection is trailing edge down.
      </description>
      <table>
         <independentVar lookup="row"> aero/alpha-deg </independentVar>
         <independentVar lookup="column"> fcs/flap-pos-deg </independentVar>
         <tableData>
                            .0000   15.0000   30.0000   40.0000
                -2.0000     .0000     .0056     .0193     .0249
                  .0000     .0000     .0105     .0280     .0347
                 2.0000     .0000     .0154     .0367     .0446
                 4.0000     .0000     .0202     .0454     .0544
                 8.0000     .0000     .0299     .0628     .0741
                 9.0000     .0000     .0324     .0671     .0790
                10.0000     .0000     .0348     .0715     .0840
                11.0000     .0000     .0372     .0759     .0889
                12.0000     .0000     .0397     .0802     .0938
                13.0000     .0000     .0421     .0846     .0987
                14.0000     .0000     .0445     .0889     .1036
                15.0000     .0000     .0470     .0933     .1086
                16.0000     .0000     .0494     .0976     .1135
         </tableData>
      </table>
   </function>

   <function name="aero/coefficient/dCD_Elev">
      <description>
         Drag coefficient increment due to elevator deflection.
         Positive surface deflection is trailing edge down.
      </description>
      <table>
         <independentVar lookup="row"> aero/alpha-deg </independentVar>
         <independentVar lookup="column"> fcs/elevator-pos-deg </independentVar>
         <tableData>
                         -20.0000  -15.0000  -10.0000   -5.0000     .0000    5.0000   10.0000   13.0000   16.0000
                -2.0000     .0053     .0046     .0024     .0007     .0000     .0002     .0014     .0025     .0035
                  .0000     .0039     .0034     .0015     .0003     .0000     .0007     .0023     .0036     .0049
                 2.0000     .0026     .0021     .0006    -.0002     .0000     .0011     .0031     .0047     .0062
                 4.0000     .0013     .0009    -.0002    -.0006     .0000     .0015     .0040     .0058     .0074
                 8.0000    -.0013    -.0015    -.0019    -.0014     .0000     .0024     .0057     .0079     .0100
                 9.0000    -.0020    -.0021    -.0023    -.0016     .0000     .0026     .0061     .0085     .0106
                10.0000    -.0027    -.0028    -.0027    -.0018     .0000     .0028     .0065     .0091     .0113
                11.0000    -.0034    -.0034    -.0032    -.0021     .0000     .0030     .0070     .0096     .0120
                12.0000    -.0041    -.0041    -.0037    -.0023     .0000     .0033     .0075     .0103     .0127
                13.0000    -.0049    -.0048    -.0042    -.0026     .0000     .0035     .0080     .0109     .0134
                14.0000    -.0057    -.0056    -.0047    -.0028     .0000     .0038     .0085     .0115     .0142
                15.0000    -.0064    -.0063    -.0052    -.0031     .0000     .0040     .0090     .0122     .0150
                16.0000    -.0073    -.0070    -.0057    -.0033     .0000     .0043     .0095     .0129     .0158
         </tableData>
      </table>
   </function>

   <axis name="DRAG">

      <function name="aero/force/drag-lbs">
         <description>
            Drag force = ( CD_wbh + dCd_Power + dCD_Flap + dCD_Elev )
                         * q_bar * wing area
         </description>
         <product>
            <sum>
               <property> aero/coefficient/CD_wbh </property>
               <property> aero/coefficient/dCD_Flap </property>
               <property> aero/coefficient/dCD_Elev </property>
               <property> aero/coefficient/dCd_Power </property>
            </sum>
            <property> aero/qbar-psf </property>
            <property> metrics/Sw-sqft </property>
         </product>
      </function>

   </axis>

<!-- **********************************************************************
                SIDE FORCE
     ********************************************************************** -->

   <function name="aero/derivative/CYbeta-per_rad">
      <description>
         Side force coefficient derivative due to sideslip, per rad
         Contributes to damping of dutch roll mode
      </description>
      <table>
         <independentVar lookup="row"> aero/alpha-deg </independentVar>
         <tableData>
             -2.0000    -.7481
             16.0000    -.7481
         </tableData>
      </table>
   </function>

   <function name="aero/derivative/CYp-per_rad">
      <description>
         Side Force coefficient derivative due to roll rate, per rad
      </description>
      <table>
         <independentVar lookup="row"> aero/alpha-deg </independentVar>
         <tableData>
                 -2.0000         .1660
                   .0000         .2070
                  2.0000         .2486
                  4.0000         .2906
                  8.0000         .3766
                  9.0000         .3956
                 10.0000         .4139
                 11.0000         .4312
                 12.0000         .4476
                 13.0000         .4628
                 14.0000         .4768
                 15.0000         .4861
                 16.0000         .4971
         </tableData>
      </table>
   </function>

   <function name="aero/derivative/CYr-per_rad">
      <description>
         Side Force coefficient derivative due to yaw rate
         DATCOM does not calculate this term
         Effect is small
      </description>
      <table>
         <independentVar lookup="row"> velocities/r-rad_sec </independentVar>
         <tableData>
             -2.0000     .0000
               .0000     .0000
              2.0000     .0000
         </tableData>
      </table>
   </function>

   <function name="aero/coefficient/dCY_Rud">
      <description>
         Side Force coefficient increment due to rudder
         DATCOM does not calculate this term
      </description>
      <table>
         <independentVar lookup="row"> fcs/rudder-pos-deg </independentVar>
         <tableData>
            -30.0000     .0000
               .0000     .0000
             30.0000     .0000
         </tableData>
      </table>

   </function>

   <function name="aero/coefficient/dCY_Ail">
      <description>
         Side Force coefficient increment due to plain flap aileron
         DATCOM does not calculate this term
         Usually neglected as small
      </description>
      <table>
         <independentVar lookup="row"> fcs/total-aileron-pos-deg </independentVar>
         <tableData>
            -64.0000     .0000
               .0000     .0000
             64.0000     .0000
         </tableData>
      </table>

   </function>

   <axis name="SIDE">

      <function name="aero/force/side-lbs">
         <description>
            Side force = ( CYbeta*beta + CYp*p*b/(2*V) + CYr*r*b/(2*V) + CYdRud + CYdAil )
                         * q_bar * wing area
         </description>
         <product>
            <sum>
               <product>
                  <property> aero/derivative/CYbeta-per_rad </property>
                  <property> aero/beta-rad </property>
               </product>
               <product>
                  <property> aero/derivative/CYp-per_rad </property>
                  <property> velocities/p-rad_sec </property>
                  <property> aero/bi2vel </property>
               </product>
               <product>
                  <property> aero/derivative/CYr-per_rad </property>
                  <property> velocities/r-rad_sec </property>
                  <property> aero/bi2vel </property>
               </product>
               <property> aero/coefficient/dCY_Rud </property>
               <property> aero/coefficient/dCY_Ail </property>
            </sum>
            <property> aero/qbar-psf </property>
            <property> metrics/Sw-sqft </property>
         </product>
      </function>

   </axis>

<!-- **********************************************************************
                ROLL MOMENT
     ********************************************************************** -->

   <function name="aero/derivative/Clbeta-per_rad">
      <description>
         Roll moment coefficient derivative due to sideslip
         Decrease of Clb to small negative value improves dutch roll damping
         High Positive value leads to excessive spiral instability
      </description>
      <table>
         <independentVar lookup="row"> aero/alpha-deg </independentVar>
         <tableData>
                 -2.0000        -.0152
                   .0000        -.0289
                  2.0000        -.0428
                  4.0000        -.0571
                  8.0000        -.0870
                  9.0000        -.0929
                 10.0000        -.0976
                 11.0000        -.1013
                 12.0000        -.1040
                 13.0000        -.1056
                 14.0000        -.1060
                 15.0000        -.1049
                 16.0000        -.1052
         </tableData>
      </table>
   </function>

   <function name="aero/derivative/Clp-per_rad">
      <description>
         Roll moment coefficient derivative due to roll rate
         Clp alone determines damping-in-roll characteristics
      </description>
      <table>
         <independentVar lookup="row"> aero/alpha-deg </independentVar>
         <tableData>
                 -2.0000        -.5878
                   .0000        -.5975
                  2.0000        -.6058
                  4.0000        -.6084
                  8.0000        -.4928
                  9.0000        -.4389
                 10.0000        -.3857
                 11.0000        -.3266
                 12.0000        -.2620
                 13.0000        -.1919
                 14.0000        -.1164
                 15.0000        -.1392
                 16.0000        -.2637
         </tableData>
      </table>
   </function>

   <function name="aero/derivative/Clr-per_rad">
      <description>
         Roll moment coefficient derivative due to yaw rate, per rad
         Considerable effect on spiral mode.
         Large positive values leads to strong sprial instability
      </description>
      <table>
         <independentVar lookup="row"> aero/alpha-deg </independentVar>
         <tableData>
                 -2.0000         .1003
                   .0000         .1442
                  2.0000         .1888
                  4.0000         .2336
                  8.0000         .3219
                  9.0000         .3373
                 10.0000         .3505
                 11.0000         .3610
                 12.0000         .3688
                 13.0000         .3735
                 14.0000         .3749
                 15.0000         .3728
                 16.0000         .3761
         </tableData>
      </table>
   </function>

   <function name="aero/coefficient/dCl_Ail">
      <description>
         Roll Moment coefficient increment due to aileron deflection
         Positive surface deflection is trailing edge down.
         Positive rolling moment is right wing down
      </description>
      <table>
         <independentVar lookup="row"> fcs/total-aileron-pos-deg </independentVar>
         <tableData>
            -64.0000    -.0407
            -40.0000    -.0342
            -20.0000    -.0216
            -10.0000    -.0108
               .0000     .0000
             10.0000     .0108
             20.0000     .0216
             40.0000     .0342
             64.0000     .0407
         </tableData>
      </table>
   </function>

   <function name="aero/coefficient/dCl_Rud">
      <description>
         Roll moment coefficient increment due to rudder
         DATCOM does not calculate this term
      </description>
      <table>
         <independentVar lookup="row"> fcs/rudder-pos-deg </independentVar>
         <tableData>
            -30.0000     .0000
               .0000     .0000
             30.0000     .0000
         </tableData>
      </table>
   </function>

   <axis name="ROLL">

      <function name="aero/moment/roll-lbsft">
         <description>
            Roll Moment = ( Clbeta*beta + Clp*p*b/(2*V) + Clr*r*b/(2*V) + dCl_Ail + dCl_Rud )
                         * q_bar * wing area * wing span
         </description>
         <product>
            <sum>
               <product>
                  <property> aero/derivative/Clbeta-per_rad </property>
                  <property> aero/beta-rad </property>
               </product>
               <product>
                  <property> aero/derivative/Clp-per_rad </property>
                  <property> velocities/p-rad_sec </property>
                  <property> aero/bi2vel </property>
               </product>
               <product>
                  <property> aero/derivative/Clr-per_rad </property>
                  <property> velocities/r-rad_sec </property>
                  <property> aero/bi2vel </property>
               </product>
               <property> aero/coefficient/dCl_Ail </property>
               <property> aero/coefficient/dCl_Rud </property>
            </sum>
            <property> aero/qbar-psf </property>
            <property> metrics/Sw-sqft </property>
            <property> metrics/bw-ft </property>
         </product>
      </function>

   </axis>

<!-- **********************************************************************
                PITCH MOMENT
     ********************************************************************** -->

   <function name="aero/coefficient/CM_wbh">
      <description>
         Pitch moment coefficient as a function of alpha
         CM0 is included in this term
      </description>
      <table>
         <independentVar lookup="row"> aero/alpha-deg </independentVar>
         <tableData>
                 -2.0000         .0911
                   .0000         .0400
                  2.0000        -.0141
                  4.0000        -.0721
                  8.0000        -.1978
                  9.0000        -.2299
                 10.0000        -.2662
                 11.0000        -.3040
                 12.0000        -.3437
                 13.0000        -.3856
                 14.0000        -.4286
                 15.0000        -.4674
                 16.0000        -.5014
         </tableData>
      </table>
   </function>

   <function name="aero/derivative/CMq-per_rad">
      <description>
         Pitch moment coefficient derivative due to pitch rate, per rad
         Pitch damping derivative - Very important to short period damping of oscillations
      </description>
      <table>
         <independentVar lookup="row"> aero/alpha-deg </independentVar>
         <tableData>
             -2.0000  -22.1878
             16.0000  -22.1878
         </tableData>
      </table>
   </function>

   <function name="aero/derivative/CMadot-per_rad">
      <description>
         Pitch moment coefficient derivative due to AOA rate, per rad
         Negative CMadot increase short period damping
      </description>
      <table>
         <independentVar lookup="row"> aero/alpha-deg </independentVar>
         <tableData>
                 -2.0000       -5.7680
                   .0000       -5.9115
                  2.0000       -6.1916
                  4.0000       -6.3946
                  8.0000       -6.6742
                  9.0000       -6.0142
                 10.0000       -5.1591
                 11.0000       -4.7801
                 12.0000       -4.2906
                 13.0000       -3.7525
                 14.0000       -3.4552
                 15.0000       -3.2057
                 16.0000       -2.9843
         </tableData>
      </table>
   </function>

   <function name="aero/coefficient/dCM_Elev">
      <description>
         Pitch moment coefficient increment due to elevator deflection
         Positive surface deflection is trailing edge down
      </description>
      <table>
         <independentVar lookup="row"> fcs/elevator-pos-deg </independentVar>
         <tableData>
            -20.0000     .3671
            -15.0000     .3413
            -10.0000     .2374
             -5.0000     .1187
               .0000    -.0002
              5.0000    -.1187
             10.0000    -.2374
             13.0000    -.3039
             16.0000    -.3572
         </tableData>
      </table>
   </function>

   <function name="aero/coefficient/dCM_Flap">
      <description>
         Pitch moment coefficient increment due to flap deflection
         Positive surface deflection is trailing edge down.
      </description>
      <table>
         <independentVar lookup="row"> fcs/flap-pos-deg </independentVar>
         <tableData>
               .0000     .0000
             15.0000     .0796
             30.0000     .1416
             40.0000     .1591
         </tableData>
      </table>
   </function>

   <function name="aero/coefficient/dCM_Power">
      <description>
         Pitch moment coefficient increment due to thrust effects
      </description>
      <table>
         <independentVar lookup="row"> aero/alpha-deg </independentVar>
         <independentVar lookup="column"> propulsion/total-thrust-coefficient </independentVar>
         <tableData>
                            .0000     .1000     .2000     .3000
                -2.0000     .0000    -.0017    -.0035    -.0052
                  .0000     .0000    -.0017    -.0035    -.0052
                 2.0000     .0000    -.0017    -.0035    -.0052
                 4.0000     .0000    -.0017    -.0035    -.0052
                 8.0000     .0000    -.0017    -.0035    -.0052
                 9.0000     .0000    -.0017    -.0035    -.0052
                10.0000     .0000    -.0017    -.0035    -.0052
                11.0000     .0000    -.0017    -.0035    -.0052
                12.0000     .0000    -.0017    -.0035    -.0052
                13.0000     .0000    -.0017    -.0035    -.0052
                14.0000     .0000    -.0017    -.0035    -.0052
                15.0000     .0000    -.0017    -.0035    -.0052
                16.0000     .0000    -.0017    -.0035    -.0052
         </tableData>
      </table>
   </function>

   <axis name="PITCH">

      <function name="aero/moment/pitch-lbsft">
         <description>
            Pitch Moment = ( CM_wbh + CMq*q*MAC/(2*V) + CMadot*adot*MAC/(2*V) + dCM_Elev + dCM_Flap + CM_Power )
                           * q_bar * wing area * wing MAC
         </description>
         <product>
            <sum>
               <property> aero/coefficient/CM_wbh </property>
               <product>
                  <property> aero/derivative/CMq-per_rad </property>
                  <property> velocities/q-rad_sec </property>
                  <property> aero/ci2vel </property>
               </product>
               <product>
                  <property> aero/derivative/CMadot-per_rad </property>
                  <property> aero/alphadot-rad_sec </property>
                  <property> aero/ci2vel </property>
               </product>
               <property> aero/coefficient/dCM_Elev </property>
               <property> aero/coefficient/dCM_Flap </property>
               <property> aero/coefficient/dCM_Power </property>
            </sum>
            <property> aero/qbar-psf </property>
            <property> metrics/Sw-sqft </property>
            <property> metrics/cbarw-ft </property>
         </product>
      </function>

   </axis>

<!-- **********************************************************************
                YAW MOMENT
     ********************************************************************** -->

   <function name="aero/derivative/CNbeta-per_rad">
      <description>
         Yaw moment coefficient derivative due to sideslip, per rad
         Determines dutch roll and spiral characteristics
         Prevents side-slip and counters yawing moments
      </description>
      <table>
         <independentVar lookup="row"> aero/alpha-deg </independentVar>
         <tableData>
             -2.0000     .0744
             16.0000     .0744
         </tableData>
      </table>
   </function>

   <function name="aero/derivative/CNp-per_rad">
      <description>
         Yaw moment coefficient derivative due to roll rate, per rad
         Reduces Dutch Roll damping. Positive value desireable
      </description>
      <table>
         <independentVar lookup="row"> aero/alpha-deg </independentVar>
         <tableData>
                 -2.0000        -.0083
                   .0000        -.0357
                  2.0000        -.0634
                  4.0000        -.0917
                  8.0000        -.1533
                  9.0000        -.1675
                 10.0000        -.1812
                 11.0000        -.1944
                 12.0000        -.2068
                 13.0000        -.2183
                 14.0000        -.2286
                 15.0000        -.2335
                 16.0000        -.2383
         </tableData>
      </table>
   </function>

   <function name="aero/derivative/CNr-per_rad">
      <description>
         Yaw moment coefficient derivative due to yaw rate, per rad
         Main contributor to damping of Dutch Roll
      </description>
      <table>
         <independentVar lookup="row"> aero/alpha-deg </independentVar>
         <tableData>
                 -2.0000        -.2954
                   .0000        -.3002
                  2.0000        -.3047
                  4.0000        -.3091
                  8.0000        -.3172
                  9.0000        -.3187
                 10.0000        -.3200
                 11.0000        -.3210
                 12.0000        -.3217
                 13.0000        -.3220
                 14.0000        -.3219
                 15.0000        -.3215
                 16.0000        -.3212
         </tableData>
      </table>
   </function>

   <function name="aero/coefficient/dCN_Ail">
      <description>
         Yaw Moment coefficient increment due to aileron deflection
         Positive surface deflection is trailing edge down.
         Positive yawing moment is nose right
      </description>
      <table>
         <independentVar lookup="row"> aero/alpha-deg </independentVar>
         <independentVar lookup="column"> fcs/total-aileron-pos-deg </independentVar>
         <tableData>
                         -64.0000  -40.0000  -20.0000  -10.0000     .0000   10.0000   20.0000   40.0000   64.0000
                -2.0000     .0006     .0005     .0003     .0002     .0000    -.0002    -.0003    -.0005    -.0006
                  .0000     .0014     .0012     .0007     .0004     .0000    -.0004    -.0007    -.0012    -.0014
                 2.0000     .0022     .0018     .0012     .0006     .0000    -.0006    -.0012    -.0018    -.0022
                 4.0000     .0030     .0025     .0016     .0008     .0000    -.0008    -.0016    -.0025    -.0030
                 8.0000     .0046     .0038     .0024     .0012     .0000    -.0012    -.0024    -.0038    -.0046
                 9.0000     .0049     .0041     .0026     .0013     .0000    -.0013    -.0026    -.0041    -.0049
                10.0000     .0051     .0043     .0027     .0014     .0000    -.0014    -.0027    -.0043    -.0051
                11.0000     .0054     .0045     .0028     .0014     .0000    -.0014    -.0028    -.0045    -.0054
                12.0000     .0055     .0047     .0029     .0015     .0000    -.0015    -.0029    -.0047    -.0055
                13.0000     .0057     .0048     .0030     .0015     .0000    -.0015    -.0030    -.0048    -.0057
                14.0000     .0058     .0048     .0031     .0015     .0000    -.0015    -.0031    -.0048    -.0058
                15.0000     .0058     .0049     .0031     .0015     .0000    -.0015    -.0031    -.0049    -.0058
                16.0000     .0059     .0050     .0031     .0016     .0000    -.0016    -.0031    -.0050    -.0059
         </tableData>
      </table>
   </function>

   <function name="aero/coefficient/dCN_Rud">
      <description>
         Yaw coefficient increment due to rudder
         DATCOM does not calculate this, but a default value is supplied
      </description>
      <table>
         <independentVar lookup="row"> fcs/rudder-pos-deg </independentVar>
         <tableData>
            -10.0000    -.0100
               .0000     .0000
             10.0000     .0100
         </tableData>
      </table>
   </function>

   <axis name="YAW">

      <function name="aero/moment/yaw-lbsft">
         <description>
            Yaw Moment = ( CNbeta*beta + CNp*p*b/(2*V) + CNr*r*b/(2*V) + dCN_Ail + dCN_Rud )
                         * q_bar * wing area * wing span
         </description>
         <product>
            <sum>
               <product>
                  <property> aero/derivative/CNbeta-per_rad </property>
                  <property> aero/beta-rad </property>
               </product>
               <product>
                  <property> aero/derivative/CNp-per_rad </property>
                  <property> velocities/p-rad_sec </property>
                  <property> aero/bi2vel </property>
               </product>
               <product>
                  <property> aero/derivative/CNr-per_rad </property>
                  <property> velocities/r-rad_sec </property>
                  <property> aero/bi2vel </property>
               </product>
               <property> aero/coefficient/dCN_Ail </property>
               <property> aero/coefficient/dCN_Rud </property>
            </sum>
            <property> aero/qbar-psf </property>
            <property> metrics/Sw-sqft </property>
            <property> metrics/bw-ft </property>
         </product>
      </function>

   </axis>

</aerodynamics>
