<?xml version="1.0"?>
<?xml-stylesheet type="text/xsl" href="http://jsbsim.sourceforge.net/JSBSim.xsl"?>

<fdm_config name="C-5 Galaxy" version="2.0" release="ALPHA"
   xmlns:xsi="http://www.w3.org/2001/XMLSchema-instance"
   xsi:noNamespaceSchemaLocation="http://jsbsim.sourceforge.net/JSBSim.xsd">

	<fileheader>
		<author> Jon Bourgeois, Peter Brendt (range corrections, GE specs) </author>
		<filecreationdate> 2010-03-14 </filecreationdate>
		<version>2.0</version>
		<description> Models a C-5 Galaxy. </description>
	</fileheader>

	<!--
		File:     C-5.xml
		Inputs:
			name:          C-5_Galaxy
			type:          four-engine transonic transport
			manufacturer:  Lockheed
			first flight:  30 June 1968
			max weight:    840000 lb (381,000 kg)
			empty weight:  380,000 lb (172,370 kg)
			loaded weight: 769,000 lb (348,800 kg)
			wing span:     222.74709 ft (67.89 m)
			length:        247.09211 ft (75.31 m)
			height:		   65 ft (19.84 m)
			wing area:     6200 sq-ft
			gear type:     tricycle
			retractable?:  yes
			# engines:     4
			engine type:   fan-jet
			engine layout: wings
			yaw damper?    yes
		Outputs:
			wing loading:  27.75 lb/sq-ft
			CL-alpha:      4.4 per radian
			CL-0:          0.2
			CL-max:        1.2
			CD-0:          0.017
			K:             0.042
		General Characteristics:
			Crew: 8 typical (pilot, first pilot, 1st Officer, two flight engineers, three loadmasters) 4 minimum (pilot, copilot, two flight engineers)
			Payload: A/B/C models 270,000 lb (122,470 kg) M Model: 285,000 lb (129,274 kg)
			Engines A/B/C Models:	GE TF-39 43,000 lbs thrust per engine
			Engines M Model:	GE CF6-80C2L1F 51,250 lbs thrust per engine (according to www.af.mil fact sheet)
			Fuel Capacity:		51,450 gallons or 332,500 lb (150,819 kg)
			Fuel Tanks:		12 integral tanks in wings
			Normal Cruise Speed: 	Mach 0.77
			Cargo Bay:		121 ft (37 m) long, 13.5 ft (4.1 m) high, and 19 ft (5.8 m) wide, or just over 31,000 cu ft (880 m3)
			Cargo Bay Capacity:	36 463L Pallets
			Tires 49 X 17 inches or 1.2446 X 0.4318 meters
	-->

	<metrics>
		<wingarea  unit="FT2"> 6200.00 </wingarea>
		<wingspan  unit="FT" >  222.75 </wingspan>
		<wing_incidence> 3.00 </wing_incidence>
		<chord     unit="FT" >  35.70 </chord>
		<htailarea unit="FT2"> 966 </htailarea>
		<htailarm  unit="FT" >  139.31 </htailarm>
		<vtailarea unit="FT2"> 961 </vtailarea>
		<vtailarm  unit="FT" >  111.71 </vtailarm>
		<location name="AERORP" unit="IN">
			<x> 1280.50 </x>
			<y>   0.00 </y>
			<z>   0.00 </z>
		</location>
		<location name="EYEPOINT" unit="IN">
			<x> 232.12 </x>
			<y> -27.85 </y>
			<z>  154.75 </z>
		</location>
		<location name="VRP" unit="IN">
			<x>0</x>
			<y>0</y>
			<z>360</z>
		</location>
	</metrics>

	<mass_balance>
		<ixx unit="SLUG*FT2">  14067811.7032 </ixx>
		<iyy unit="SLUG*FT2">  19614209.0022 </iyy>
		<izz unit="SLUG*FT2">  32969644.0486 </izz>
		<emptywt unit="LBS" >  380000 </emptywt>
		<location name="CG" unit="IN">
			<x>1330.40 </x>  <!-- 111.70 Ft originally -->
			<y>   0.00 </y>
			<z> 150.00 </z>
		</location>

		<pointmass name="Commander">
			<weight unit="LBS"> 180 </weight>
			<location name="POINTMASS" unit="IN">
				<x>  272.12 </x>
				<y>    0.00 </y>
				<z>  154.75 </z>
			</location>
		</pointmass>

		<pointmass name="Pilot">
			<weight unit="LBS"> 180 </weight>
			<location name="POINTMASS" unit="IN">
				<x>  232.12 </x>
				<y>  -27.85 </y>
				<z>  154.75 </z>
			</location>
		</pointmass>

		<pointmass name="Copilot">
			<weight unit="LBS"> 180 </weight>
			<location name="POINTMASS" unit="IN">
				<x> 232.12 </x>
				<y> 27.85 </y>
				<z>  154.75 </z>
			</location>
		</pointmass>

		<pointmass name="Engineers">
			<weight unit="LBS"> 360 </weight>
			<location name="POINTMASS" unit="IN">
				<x>  302.12 </x>	<!-- actually, one sits left, one sits right, so the equal each other out -->
				<y>    0.00 </y>
				<z>  154.75 </z>
			</location>
		</pointmass>

		<pointmass name="Loadmasters">
			<weight unit="LBS"> 540 </weight>
			<location name="POINTMASS" unit="IN">
				<x>  1349.90 </x>	<!-- actually, one sits left, one sits right, so the equal each other out -->
				<y>    0.00 </y>
				<z>  154.75 </z>
			</location>
		</pointmass>

		<pointmass name="payload">
			<weight unit="LBS">0</weight>
			<location name="POINTMASS" unit="IN">
				<x> 1349.70 </x>
				<y>   0.00000 </y>
				<z>  -2.36235 </z>
			</location>
		</pointmass>

	</mass_balance>

	<ground_reactions>

		<contact type="BOGEY" name="NOSEGEAR">
			<location unit="IN">
				<x> 504.48 </x>
				<y>   0.00 </y>
				<z> 141.84 </z>
			</location>
			<static_friction>  0.80 </static_friction>
			<dynamic_friction> 0.50 </dynamic_friction>
			<rolling_friction> 0.02 </rolling_friction>
			<spring_coeff unit="LBS/FT">      570000.00 </spring_coeff>
			<damping_coeff unit="LBS/FT/SEC"> 214000.00 </damping_coeff>
			<damping_coeff_rebound unit="LBS/FT/SEC"> 214000.00 </damping_coeff_rebound>
			<max_steer unit="DEG">65</max_steer>
			<retractable>1</retractable>
		</contact>

		<contact type="BOGEY" name="Main1_Left Front">
			<location unit="IN">
				<x> 1278.23 </x>
				<y> -147.01 </y>
				<z>  140.84 </z>
			</location>
			<static_friction>  0.80 </static_friction>
			<dynamic_friction> 0.50 </dynamic_friction>
			<rolling_friction> 0.02 </rolling_friction>
			<spring_coeff unit="LBS/FT">      570000.00 </spring_coeff>
			<damping_coeff unit="LBS/FT/SEC"> 214000.00 </damping_coeff>
			<damping_coeff_rebound unit="LBS/FT/SEC"> 214000.00 </damping_coeff_rebound>
			<max_steer unit="DEG">0</max_steer>
			<brake_group>LEFT</brake_group>
			<retractable>1</retractable>
		</contact>

		<contact type="BOGEY" name="Main2_Left Rear">
			<location unit="IN">
				<x> 1505.71 </x>
				<y> -147.01 </y>
				<z>  140.84 </z>
			</location>
			<static_friction>  0.80 </static_friction>
			<dynamic_friction> 0.50 </dynamic_friction>
			<rolling_friction> 0.02 </rolling_friction>
			<spring_coeff unit="LBS/FT">      570000.00 </spring_coeff>
			<damping_coeff unit="LBS/FT/SEC"> 214000.00 </damping_coeff>
			<damping_coeff_rebound unit="LBS/FT/SEC"> 214000.00 </damping_coeff_rebound>
			<brake_group>LEFT</brake_group>
			<retractable>1</retractable>
		</contact>

		<contact type="BOGEY" name="Main3_Right Front">
			<location unit="IN">
				<x> 1278.23 </x>
				<y> 147.01 </y>
				<z> 140.84 </z>
			</location>
			<static_friction>  0.80 </static_friction>
			<dynamic_friction> 0.50 </dynamic_friction>
			<rolling_friction> 0.02 </rolling_friction>
			<spring_coeff unit="LBS/FT">      570000.00 </spring_coeff>
			<damping_coeff unit="LBS/FT/SEC"> 214000.00 </damping_coeff>
			<damping_coeff_rebound unit="LBS/FT/SEC"> 214000.00 </damping_coeff_rebound>
			<brake_group>RIGHT</brake_group>
			<retractable>1</retractable>
		</contact>

		<contact type="BOGEY" name="Main4_Right Rear">
			<location unit="IN">
				<x> 1505.71 </x>
				<y> 147.01 </y>
				<z> 140.84 </z>
			</location>
			<static_friction>  0.80 </static_friction>
			<dynamic_friction> 0.50 </dynamic_friction>
			<rolling_friction> 0.02 </rolling_friction>
			<spring_coeff unit="LBS/FT">      570000.00 </spring_coeff>
			<damping_coeff unit="LBS/FT/SEC"> 214000.00 </damping_coeff>
			<damping_coeff_rebound unit="LBS/FT/SEC"> 214000.00 </damping_coeff_rebound>
			<brake_group>RIGHT</brake_group>
			<retractable>1</retractable>
		</contact>

		<!-- contact type="STRUCTURE" name="LEFT_WING">
			<location unit="IN">
				<x> 1584.63 </x>
				<y> -1445.36 </y>
				<z> 60.24 </z>
			</location>
			<static_friction>  0.80 </static_friction>
			<dynamic_friction> 0.50 </dynamic_friction>
			<spring_coeff unit="LBS/FT">      500000.0 </spring_coeff>
			<damping_coeff unit="LBS/FT/SEC"> 500000.0 </damping_coeff>
		</contact>

		<contact type="STRUCTURE" name="RIGHT_WING">
			<location unit="IN">
				<x> 1584.63 </x>
				<y> -1445.36 </y>
				<z> 60.24 </z>
			</location>
			<static_friction>  0.80 </static_friction>
			<dynamic_friction> 0.50 </dynamic_friction>
			<spring_coeff unit="LBS/FT">      500000.0 </spring_coeff>
			<damping_coeff unit="LBS/FT/SEC"> 500000.0 </damping_coeff>
		</contact>

		<contact type="STRUCTURE" name="NG_POD">
			<location unit="IN">
				<x> 510.67 </x>
				<y> 0 </y>
				<z> 151.65 </z>
			</location>
			<static_friction>  0.80 </static_friction>
			<dynamic_friction> 0.50 </dynamic_friction>
			<spring_coeff unit="LBS/FT">      500000.0 </spring_coeff>
			<damping_coeff unit="LBS/FT/SEC"> 500000.0 </damping_coeff>
		</contact>

		<contact type="STRUCTURE" name="Nosetip">
			<location unit="IN">
				<x> 0 </x>
				<y> 0 </y>
				<z> 60 </z>
			</location>
			<static_friction>  0.80 </static_friction>
			<dynamic_friction> 0.50 </dynamic_friction>
			<spring_coeff unit="LBS/FT">      500000.0 </spring_coeff>
			<damping_coeff unit="LBS/FT/SEC"> 500000.0 </damping_coeff>
		</contact>

		<contact type="STRUCTURE" name="MLG_PODLT">
			<location unit="IN">
				<x> 1391.97 </x>
				<y> -147.01 </y>
				<z> 148.56 </z>
			</location>
			<static_friction>  0.80 </static_friction>
			<dynamic_friction> 0.50 </dynamic_friction>
			<spring_coeff unit="LBS/FT">      500000.0 </spring_coeff>
			<damping_coeff unit="LBS/FT/SEC"> 500000.0 </damping_coeff>
		</contact>

		<contact type="STRUCTURE" name="MLG_PODRT">
			<location unit="IN">
				<x> 1391.97 </x>
				<y> 147.01 </y>
				<z> 148.56 </z>
			</location>
			<static_friction>  0.80 </static_friction>
			<dynamic_friction> 0.50 </dynamic_friction>
			<spring_coeff unit="LBS/FT">      500000.0 </spring_coeff>
			<damping_coeff unit="LBS/FT/SEC"> 500000.0 </damping_coeff>
		</contact>

		<contact type="STRUCTURE" name="Rear_Fuselage">
			<location unit="IN">
				<x> 2429.57 </x>
				<y> 0 </y>
				<z> 32.38 </z>
			</location>
			<static_friction>  0.80 </static_friction>
			<dynamic_friction> 0.50 </dynamic_friction>
			<spring_coeff unit="LBS/FT">      500000.0 </spring_coeff>
			<damping_coeff unit="LBS/FT/SEC"> 500000.0 </damping_coeff>
		</contact -->

	</ground_reactions>

	<propulsion>

		<engine file="GE_F138-GE-100"> <!-- Engine1 -->
			<location unit="IN">
				<x> 1293.71 </x>
				<y> -804.70 </y>
				<z> -21.66 </z>
			</location>
			<orient unit="DEG">
				<pitch> 0.00 </pitch>
				<roll>   0.00 </roll>
				<yaw>   0.00 </yaw>
			</orient>
			<feed>0</feed>
			<feed>1</feed>
			<feed>4</feed>
			<thruster file="direct">
				<location unit="IN">
					<x> 1334.18 </x>
					<y> -804.70 </y>
					<z> -21.66 </z>
				</location>
				<orient unit="DEG">
					<pitch> 0.00 </pitch>
					<roll>   0.00 </roll>
					<yaw>   0.00 </yaw>
				</orient>
			</thruster>
		</engine>

		<engine file="GE_F138-GE-100"> <!-- Engine2 -->
			<location unit="IN">
				<x> 1148.24 </x>
				<y> -213.77 </y>
				<z> 6.19 </z>
			</location>
			<orient unit="DEG">
				<pitch> 0.00 </pitch>
				<roll>   0.00 </roll>
				<yaw>   0.00 </yaw>
			</orient>
			<feed>3</feed>
			<feed>2</feed>
			<feed>5</feed>
			<thruster file="direct">
				<location unit="IN">
					<x> 1228.71 </x>
					<y> -213.77 </y>
					<z> 6.19 </z>
				</location>
				<orient unit="DEG">
					<pitch> 0.00 </pitch>
					<roll>   0.00 </roll>
					<yaw>   0.00 </yaw>
				</orient>
			</thruster>
		</engine>

		<engine file="GE_F138-GE-100"> <!-- Engine3 -->
			<location unit="IN">
				<x> 1148.24 </x>
				<y> 213.77 </y>
				<z> 6.19 </z>
			</location>
			<orient unit="DEG">
				<pitch> 0.00 </pitch>
				<roll>   0.00 </roll>
				<yaw>   0.00 </yaw>
			</orient>
			<feed>8</feed>
			<feed>9</feed>
			<feed>6</feed>
			<thruster file="direct">
				<location unit="IN">
					<x> 1228.71 </x>
					<y> 213.77 </y>
					<z> 6.19 </z>
				</location>
				<orient unit="DEG">
					<pitch> 0.00 </pitch>
					<roll>   0.00 </roll>
					<yaw>   0.00 </yaw>
				</orient>
			</thruster>
		</engine>

		<engine file="GE_F138-GE-100"> <!-- Engine4 -->
			<location unit="IN">
				<x> 1293.71 </x>
				<y> 804.70 </y>
				<z> -21.66 </z>
			</location>
			<orient unit="DEG">
				<pitch> 0.00 </pitch>
				<roll>   0.00 </roll>
				<yaw>   0.00 </yaw>
			</orient>
			<feed>11</feed>
			<feed>10</feed>
			<feed>7</feed>
			<thruster file="direct">
				<location unit="IN">
					<x> 1334.18 </x>
					<y> 804.70 </y>
					<z> -21.66 </z>
				</location>
				<orient unit="DEG">
					<pitch> 0.00 </pitch>
					<roll>   0.00 </roll>
					<yaw>   0.00 </yaw>
				</orient>
			</thruster>
		</engine>

		<tank type="FUEL" number="0"> <!-- Main1 -->
			<location unit="IN">
				<x>  1349.70 </x>
				<y> -1157.53 </y>
				<z>    64.99 </z>
			</location>
			<priority>3</priority>
			<capacity unit="LBS"> 26556.75 </capacity>
			<contents unit="LBS"> 13000 </contents>
			<type> JP-8 </type>
		</tank>

		<tank type="FUEL" number="1"> <!-- Aux1 -->
			<location unit="IN">
				<x> 1194.88 </x>
				<y> -894.45 </y>
				<z>  102.13 </z>
			</location>
			<priority>2</priority>
			<capacity unit="LBS"> 30119.27 </capacity>
			<contents unit="LBS"> 15000 </contents>
			<type> JP-8 </type>
		</tank>

		<tank type="FUEL" number="2"> <!-- Aux2 -->
			<location unit="IN">
				<x>  993.71 </x>
				<y> -544.72 </y>
				<z>  142.37 </z>
			</location>
			<priority>2</priority>
			<capacity unit="LBS"> 24461.86 </capacity>
			<contents unit="LBS"> 12000 </contents>
			<type> JP-8 </type>
		</tank>

		<tank type="FUEL" number="3"> <!-- Main2 -->
			<location unit="IN">
				<x>  876.10 </x>
				<y> -300.21 </y>
				<z>  164.03 </z>
			</location>
			<priority>3</priority>
			<capacity unit="LBS"> 43521.73 </capacity>
			<contents unit="LBS"> 22000 </contents>
			<type> JP-8 </type>
		</tank>

		<tank type="FUEL" number="4"> <!-- ExtRng1 -->
			<location unit="IN">
				<x> 1117.51 </x>
				<y> -526.15 </y>
				<z>  142.37 </z>
			</location>
			<priority>1</priority>
			<capacity unit="LBS"> 15566.64 </capacity>
			<contents unit="LBS"> 8000 </contents>
			<type> JP-8 </type>
		</tank>

		<tank type="FUEL" number="5"> <!-- ExtRng2 -->
			<location unit="IN">
				<x> 1058.70 </x>
				<y> -287.83 </y>
				<z>  164.03 </z>
			</location>
			<priority>1</priority>
			<capacity unit="LBS"> 26024.97 </capacity>
			<contents unit="LBS"> 13000 </contents>
			<type> JP-8 </type>
		</tank>

		<tank type="FUEL" number="6"> <!-- ExtRng3 -->
			<location unit="IN">
				<x> 1058.70 </x>
				<y>  287.33 </y>
				<z>  164.03 </z>
			</location>
			<priority>1</priority>
			<capacity unit="LBS"> 26024.97 </capacity>
			<contents unit="LBS"> 13000 </contents>
			<type> JP-8 </type>
		</tank>

		<tank type="FUEL" number="7"> <!-- ExtRng4 -->
			<location unit="IN">
				<x> 1117.51 </x>
				<y>  526.15 </y>
				<z>  142.37 </z>
			</location>
			<priority>1</priority>
			<capacity unit="LBS"> 15566.64 </capacity>
			<contents unit="LBS"> 8000 </contents>
			<type> JP-8 </type>
		</tank>

		<tank type="FUEL" number="8"> <!-- Main3 -->
			<location unit="IN">
				<x>  876.10 </x>
				<y>  300.21 </y>
				<z>  164.03 </z>
			</location>
			<priority>3</priority>
			<capacity unit="LBS"> 43521.73 </capacity>
			<contents unit="LBS"> 22000 </contents>
			<type> JP-8 </type>
		</tank>

		<tank type="FUEL" number="9"> <!-- Aux3 -->
			<location unit="IN">
				<x>  993.71 </x>
				<y>  544.72 </y>
				<z>  142.37 </z>
			</location>
			<priority>2</priority>
			<capacity unit="LBS"> 24461.86 </capacity>
			<contents unit="LBS"> 12000 </contents>
			<type> JP-8 </type>
		</tank>

		<tank type="FUEL" number="10"> <!-- Aux4 -->
			<location unit="IN">
				<x> 1194.88 </x>
				<y>  894.45 </y>
				<z>  102.13 </z>
			</location>
			<priority>2</priority>
			<capacity unit="LBS"> 30119.27 </capacity>
			<contents unit="LBS"> 15000 </contents>
			<type> JP-8 </type>
		</tank>

		<tank type="FUEL" number="11"> <!-- Main4 -->
			<location unit="IN">
				<x> 1349.70 </x>
				<y> 1157.53 </y>
				<z>   64.99 </z>
			</location>
			<priority>3</priority>
			<capacity unit="LBS"> 26566.75 </capacity>
			<contents unit="LBS"> 13000 </contents>
			<type> JP-8 </type>
		</tank>

	</propulsion>

	<system file="TriCycle_PushbackJSBSIM"/>

	<flight_control name="FCS: C-5">

		<channel name="Pitch">

			<summer name="Pitch Trim Sum">
				<input>fcs/elevator-cmd-norm</input>
				<input>fcs/pitch-trim-cmd-norm</input>
				<clipto>
					<min> -1 </min>
					<max>  1 </max>
				</clipto>
			</summer>

			<aerosurface_scale name="Elevator Control">
				<input>fcs/pitch-trim-sum</input>
				<range>
					<min> -0.35 </min>
					<max>  0.35 </max>
				</range>
				<output>fcs/elevator-pos-rad</output>
			</aerosurface_scale>

			<aerosurface_scale name="elevator normalization">
				<input>fcs/elevator-pos-rad</input>
				<domain>
					<min> -0.35 </min>
					<max>  0.35 </max>
				</domain>
				<range>
					<min> -1 </min>
					<max>  1 </max>
				</range>
				<output>fcs/elevator-pos-norm</output>
			</aerosurface_scale>

		</channel>

		<channel name="Roll">

			<summer name="Roll Trim Sum">
				<input>fcs/aileron-cmd-norm</input>
				<input>fcs/roll-trim-cmd-norm</input>
				<clipto>
					<min> -1 </min>
					<max>  1 </max>
				</clipto>
			</summer>

			<aerosurface_scale name="Left Aileron Control">
				<input>fcs/roll-trim-sum</input>
				<range>
					<min> -0.35 </min>
					<max>  0.35 </max>
				</range>
				<output>fcs/left-aileron-pos-rad</output>
			</aerosurface_scale>

			<aerosurface_scale name="Right Aileron Control">
				<input>fcs/roll-trim-sum</input>
				<range>
					<min> -0.35 </min>
					<max>  0.35 </max>
				</range>
				<output>fcs/right-aileron-pos-rad</output>
			</aerosurface_scale>

			<aerosurface_scale name="left aileron normalization">
				<input>fcs/left-aileron-pos-rad</input>
				<domain>
					<min> -0.35 </min>
					<max>  0.35 </max>
				</domain>
				<range>
					<min> -1 </min>
					<max>  1 </max>
				</range>
				<output>fcs/left-aileron-pos-norm</output>
			</aerosurface_scale>

			<aerosurface_scale name="right aileron normalization">
				<input>fcs/right-aileron-pos-rad</input>
				<domain>
					<min> -0.35 </min>
					<max>  0.35 </max>
				</domain>
				<range>
					<min> -1 </min>
					<max>  1 </max>
				</range>
				<output>fcs/right-aileron-pos-norm</output>
			</aerosurface_scale>

		</channel>

		<property value="1">fcs/yaw-damper-enable</property>

		<channel name="Yaw">

			<summer name="Rudder Command Sum">
				<input>fcs/rudder-cmd-norm</input>
				<input>fcs/yaw-trim-cmd-norm</input>
				<clipto>
					<min> -1 </min>
					<max>  1 </max>
				</clipto>
			</summer>

			<scheduled_gain name="Yaw Damper Rate">
				<input>velocities/r-aero-rad_sec</input>
				<table>
					<independentVar lookup="row">velocities/ve-kts</independentVar>
					<tableData>
						30     0.00
						60     2.00
					</tableData>
				</table>
				<gain>fcs/yaw-damper-enable</gain>
			</scheduled_gain>

			<summer name="Rudder Sum">
				<input>fcs/rudder-command-sum</input>
				<input>fcs/yaw-damper-rate</input>
				<clipto>
					<min> -1.1 </min>
					<max>  1.1 </max>
				</clipto>
			</summer>

			<aerosurface_scale name="Rudder Control">
				<input>fcs/rudder-sum</input>
				<domain>
					<min> -1.1 </min>
					<max>  1.1 </max>
				</domain>
				<range>
					<min> -0.35 </min>
					<max>  0.35 </max>
				</range>
				<output>fcs/rudder-pos-rad</output>
			</aerosurface_scale>

			<aerosurface_scale name="rudder normalization">
				<input>fcs/rudder-pos-rad</input>
				<domain>
					<min> -0.35 </min>
					<max>  0.35 </max>
				</domain>
				<range>
					<min> -1 </min>
					<max>  1 </max>
				</range>
				<output>fcs/rudder-pos-norm</output>
			</aerosurface_scale>

		</channel>

		<channel name="Flaps">
			<kinematic name="Flaps Control">
				<input>fcs/flap-cmd-norm</input>
				<traverse>

		<!-- flaps>
			<setting>0.000</setting> <! - - 0 deg up - - >
			<setting>0.200</setting> <! - - 8 deg maneuvering - - >
			<setting>0.400</setting> <! - - 16 deg intermediate I - - >
			<setting>0.625</setting> <! - - 25 deg intermediate II - - >
			<setting>0.800</setting> <! - - 32 deg take off - - >
			<setting>1.000</setting> <! - - 40 deg landing - - >
		</flaps -->
					<setting>
						<position>  0 </position>
						<time>      0 </time>
					</setting>
					<setting>
						<position>  8 </position>
						<time>      5 </time>
					</setting>
					<setting>
						<position> 16 </position>
						<time>     16 </time>
					</setting>
					<setting>
						<position> 25 </position>
						<time>     16 </time>
					</setting>
					<setting>
						<position> 32 </position>
						<time>     16 </time>
					</setting>
					<setting>
						<position> 40 </position>
						<time>     16 </time>
					</setting>
				</traverse>
				<output>fcs/flap-pos-deg</output>
			</kinematic>

			<aerosurface_scale name="flap normalization">
				<input>fcs/flap-pos-deg</input>
				<domain>
					<min>  0 </min>
					<max> 40 </max>
				</domain>
				<range>
					<min> 0 </min>
					<max> 1 </max>
				</range>
				<output>fcs/flap-pos-norm</output>
			</aerosurface_scale>

		</channel>

		<channel name="Landing Gear">
			<kinematic name="Gear Control">
				<input>gear/gear-cmd-norm</input>
				<traverse>
					<setting>
						<position> 0 </position>
						<time>     0 </time>
					</setting>
					<setting>
						<position> 1 </position>
						<time>     5 </time>
					</setting>
				</traverse>
				<output>gear/gear-pos-norm</output>
			</kinematic>

		</channel>

		<channel name="Speedbrake">
			<kinematic name="Speedbrake Control">
				<input>fcs/speedbrake-cmd-norm</input>
				<traverse>
					<setting>
						<position> 0 </position>
						<time>     0 </time>
					</setting>
					<setting>
						<position> 0.5 </position>
						<time>     5 </time>
					</setting>
					<setting>
						<position> 1 </position>
						<time>     5 </time>
					</setting>
				</traverse>
				<output>fcs/speedbrake-pos-norm</output>
			</kinematic>

		</channel>

		<scheduled_gain name="Scheduled Steer Pos Deg">
			<input>fcs/steer-cmd-norm</input>
			<table>
				<independentVar>velocities/vg-fps</independentVar>
				<tableData>
			                10.0        80.0
			                50.0        7.5
			                150.0       1.0
				</tableData>
			</table>
			<output>fcs/steer-pos-deg</output>
		</scheduled_gain>

	</flight_control>

	<aerodynamics>

		<axis name="LIFT">

			<function name="aero/coefficient/CLalpha">
				<description>Lift_due_to_alpha</description>
				<product>
					<property>aero/qbar-psf</property>
					<property>metrics/Sw-sqft</property>
					<table>
						<independentVar lookup="row">aero/alpha-rad</independentVar>
						<tableData>
					              -0.20  -0.880
					               0.00   0.400
						       0.23   1.400
						       0.60   0.800
						</tableData>

					</table>
				</product>
			</function>

			<function name="aero/coefficient/dCLflap">
				<description>Delta_Lift_due_to_flaps</description>
				<product>
					<property>aero/qbar-psf</property>
					<property>metrics/Sw-sqft</property>
					<property>fcs/flap-pos-deg</property>
					<value> 0.04500 </value>
				</product>
			</function>

			<function name="aero/coefficient/dCLsb">
				<description>Delta_Lift_due_to_speedbrake</description>
				<product>
					<property>aero/qbar-psf</property>
					<property>metrics/Sw-sqft</property>
					<property>fcs/speedbrake-pos-norm</property>
					<value>-0.08</value>
				</product>
			</function>

			<function name="aero/coefficient/CLde">
				<description>Lift_due_to_Elevator_Deflection</description>
				<product>
					<property>aero/qbar-psf</property>
					<property>metrics/Sw-sqft</property>
					<property>fcs/elevator-pos-rad</property>
					<value>0.2</value>
				</product>
			</function>

		</axis>

		<axis name="DRAG">

			<function name="aero/force/Drag_basic">
				<description>Drag at zero lift</description>
				<product>
					<property>aero/qbar-psf</property>
					<property>metrics/Sw-sqft</property>
					<table>
						<independentVar lookup="row">aero/alpha-rad</independentVar>
						<tableData>
							-1.57    1.500
							-0.26    0.026
							 0.00    0.020
							 0.26    0.026
							 1.57    1.500
						</tableData>
					</table>
				</product>
			</function>

			<function name="aero/force/Drag_induced">
				<description>Induced drag</description>
				<product>
					<property>aero/qbar-psf</property>
					<property>metrics/Sw-sqft</property>
					<property>aero/cl-squared</property>
					<value>0.043</value>
				</product>
			</function>

			<function name="aero/force/Drag_mach">
				<description>Drag due to mach</description>
				<product>
					<property>aero/qbar-psf</property>
					<property>metrics/Sw-sqft</property>
					<table>
						<independentVar lookup="row">velocities/mach</independentVar>
						<tableData>
							 0.00      0.000
							 0.79      0.000
							 1.10      0.023
							 1.80      0.015
						</tableData>
					</table>
				</product>
			</function>

			<function name="aero/force/Drag_flap">
				<description>Drag due to flaps</description>
				<product>
					<property>aero/qbar-psf</property>
					<property>metrics/Sw-sqft</property>
					<property>fcs/flap-pos-deg</property>
					<value> 0.00197 </value>
				</product>
			</function>

			<function name="aero/force/Drag_gear">
				<description>Drag due to gear</description>
				<product>
					<property>aero/qbar-psf</property>
					<property>metrics/Sw-sqft</property>
					<property>gear/gear-pos-norm</property>
					<value>0.025</value>
				</product>
			</function>

			<function name="aero/force/Drag_speedbrake">
				<description>Drag due to speedbrakes</description>
				<product>
					<property>aero/qbar-psf</property>
					<property>metrics/Sw-sqft</property>
					<property>fcs/speedbrake-pos-norm</property>
					<value>0.03</value>
				</product>
			</function>

			<function name="aero/force/Drag_beta">
				<description>Drag due to sideslip</description>
				<product>
					<property>aero/qbar-psf</property>
					<property>metrics/Sw-sqft</property>
					<table>
						<independentVar lookup="row">aero/beta-rad</independentVar>
						<tableData>
							-1.57    1.230
							-0.26    0.050
							 0.00    0.000
							 0.26    0.050
							 1.57    1.230
						</tableData>
					</table>
				</product>
			</function>

			<function name="aero/force/Drag_elevator">
				<description>Drag due to Elevator Deflection</description>
				<product>
					<property>aero/qbar-psf</property>
					<property>metrics/Sw-sqft</property>
					<abs><property>fcs/elevator-pos-norm</property></abs>
					<value>0.04</value>
				</product>
			</function>
		</axis>

		<axis name="SIDE">

			<function name="aero/force/Side_beta">
				<description>Side force due to beta</description>
				<product>
					<property>aero/qbar-psf</property>
					<property>metrics/Sw-sqft</property>
					<property>aero/beta-rad</property>
					<value>-1</value>
				</product>
			</function>

		</axis>

		<axis name="ROLL">

			<function name="aero/moment/Roll_beta">
				<description>Roll moment due to beta</description>
				<product>
					<property>aero/qbar-psf</property>
					<property>metrics/Sw-sqft</property>
					<property>metrics/bw-ft</property>
					<property>aero/beta-rad</property>
					<value>-0.1</value>
				</product>
			</function>

			<function name="aero/moment/Roll_damp">
				<description>Roll moment due to roll rate</description>
				<product>
					<property>aero/qbar-psf</property>
					<property>metrics/Sw-sqft</property>
					<property>metrics/bw-ft</property>
					<property>aero/bi2vel</property>
					<property>velocities/p-aero-rad_sec</property>
					<value>-0.4</value>
				</product>
			</function>

			<function name="aero/moment/Roll_yaw">
				<description>Roll moment due to yaw rate</description>
				<product>
					<property>aero/qbar-psf</property>
					<property>metrics/Sw-sqft</property>
					<property>metrics/bw-ft</property>
					<property>aero/bi2vel</property>
					<property>velocities/r-aero-rad_sec</property>
					<value>0.15</value>
				</product>
			</function>

			<function name="aero/moment/Roll_aileron">
				<description>Roll moment due to aileron</description>
				<product>
					<property>aero/qbar-psf</property>
					<property>metrics/Sw-sqft</property>
					<property>metrics/bw-ft</property>
					<property>fcs/left-aileron-pos-rad</property>
					<value>0.1</value>
				</product>
			</function>

			<function name="aero/moment/Roll_rudder">
				<description>Roll moment due to rudder</description>
				<product>
					<property>aero/qbar-psf</property>
					<property>metrics/Sw-sqft</property>
					<property>metrics/bw-ft</property>
					<property>fcs/rudder-pos-rad</property>
					<value>0.01</value>
				</product>
			</function>

		</axis>

		<axis name="PITCH">

			<function name="aero/moment/Pitch_alpha">
				<description>Pitch moment due to alpha</description>
				<product>
					<property>aero/qbar-psf</property>
					<property>metrics/Sw-sqft</property>
					<property>metrics/cbarw-ft</property>
					<property>aero/alpha-rad</property>
					<value>-0.6</value>
				</product>
			</function>

			<function name="aero/moment/Pitch_elevator">
				<description>Pitch moment due to elevator</description>
				<product>
					<property>aero/qbar-psf</property>
					<property>metrics/Sw-sqft</property>
					<property>metrics/cbarw-ft</property>
					<property>fcs/elevator-pos-rad</property>
					<table>
						<independentVar lookup="row">velocities/mach</independentVar>
						<tableData>
							0.0     -1.200
							2.0     -0.300
						</tableData>
					</table>
				</product>
			</function>

			<function name="aero/moment/Pitch_damp">
				<description>Pitch moment due to pitch rate</description>
				<product>
					<property>aero/qbar-psf</property>
					<property>metrics/Sw-sqft</property>
					<property>metrics/cbarw-ft</property>
					<property>aero/ci2vel</property>
					<property>velocities/q-aero-rad_sec</property>
					<value>-17</value>
				</product>
			</function>

			<function name="aero/moment/Pitch_alphadot">
				<description>Pitch moment due to alpha rate</description>
				<product>
					<property>aero/qbar-psf</property>
					<property>metrics/Sw-sqft</property>
					<property>metrics/cbarw-ft</property>
					<property>aero/ci2vel</property>
					<property>aero/alphadot-rad_sec</property>
					<value>-6</value>
				</product>
			</function>

		</axis>

		<axis name="YAW">

			<function name="aero/moment/Yaw_beta">
				<description>Yaw moment due to beta</description>
				<product>
					<property>aero/qbar-psf</property>
					<property>metrics/Sw-sqft</property>
					<property>metrics/bw-ft</property>
					<property>aero/beta-rad</property>
					<value>0.12</value>
				</product>
			</function>

			<function name="aero/moment/Yaw_damp">
				<description>Yaw moment due to yaw rate</description>
				<product>
					<property>aero/qbar-psf</property>
					<property>metrics/Sw-sqft</property>
					<property>metrics/bw-ft</property>
					<property>aero/bi2vel</property>
					<property>velocities/r-aero-rad_sec</property>
					<value>-0.15</value>
				</product>
			</function>

			<function name="aero/moment/Yaw_rudder">
				<description>Yaw moment due to rudder</description>
				<product>
					<property>aero/qbar-psf</property>
					<property>metrics/Sw-sqft</property>
					<property>metrics/bw-ft</property>
					<property>fcs/rudder-pos-rad</property>
					<value>-0.1</value>
				</product>
			</function>

			<function name="aero/moment/Yaw_aileron">
				<description>Adverse yaw</description>
				<product>
					<property>aero/qbar-psf</property>
					<property>metrics/Sw-sqft</property>
					<property>metrics/bw-ft</property>
					<property>fcs/left-aileron-pos-rad</property>
					<value>0</value>
				</product>
			</function>

		</axis>

	</aerodynamics>

	<external_reactions>
		<force name="pushback" frame="BODY">
			<location unit="IN">
				<x> 504.48 </x>
				<y>   0.00 </y>
				<z> -213.84 </z>
			</location>
			<direction>
				<x>1</x>
				<y>0</y>
				<z>0</z>
			</direction>
		</force>
	</external_reactions>

</fdm_config>
